# Nahom Merkebu  UGR/7646/14
# ME Assignment on Belts
# 1. A 60-hp four-cylinder internal combustion engine is used to drive a brick making machine under a schedule of two shifts per day. The drive consists of  two 26-in sheaves spaced about 12 ft apart, with a sheave speed of 400  rev/min. Select a V-flat belt arrangement. Find the factor of safety, and  estimate the life in passes and hours.
# Given:
H_nom := 60 hp
D := 26 in
d := D
C := 12 ft
N := 400 rev/min
# Required:
"Select a V-belt arrangement"
n_d == ?
Life == ?
# From table 17-15, since the drive is an IC engine, assume the source of power is medium shock with normal torque characteristic. And to be conservative, take the higher value of K_S := 1.4 for a service factor.
# Since the two sheaves are equal in size, the inside circumference is easily calculated...
L := 2*C + 2*π*D/2 explicit, ALL → 2*12*ft + 2*π*26*in/2 = 369.681 in
# From table 17-10, the closest nominal belt length to this value is L := 360 in under section D.
# Then using table 17-11, convert inside circumference to pitch length. For section D belts, we add 3.3''
L_p := L + 3.3 in = 363.3 in
θ_d := π
θ_D := π  # *(Because the pulleys are equal in size.)
# From Table 17-13, for θ_d = 180 deg, K_1 := 1and  from table 17-14, for D360, K_2 := 1.10
# From table 17-12, by linear interpolation, we get H_tab := 16.94 hp
H_a := K_1*K_2*H_tab → 18.634*hp  # This is the allowable power per belt...
H_d := H_nom*K_S*n_d substitute, n_d == 1 → 84.0*hp
# Then, the required number of belts is...
N_b := H_d/H_a explicit, ALL → 84.0*hp/(18.634*hp) = 4.50789
N_b := ceil(4.508) = 5
# We round up to 5 because any number below 5 will result in power-per-belt more than the allowable value...
ΔF_a := H_a/(N*d/2) = 225.849 lbf
T_a := ΔF_a*d/2 = 2936.04 lbf*in  # ....*per belt
V := d/2*N = 2722.71 ft/min
F_c == K_c*(V/1000)^2  # Equation 17-21 where from table 17-21 we find that K_c := 3.498 and K_b := 5680
F_c := (K_c*(V*min/ft/1000)^2) lbf = 25.9313 lbf  # per belt  # Assume f := 0.5
F_i := T_a/d*((exp(f*θ_d) + 1)/(exp(f*θ_d) - 1)) float, 4 → 172.2*lbf  # ...Equation 17-9
F_1 := F_c + F_i*(2*exp(f*θ_d)/(exp(f*θ_d) + 1)) = 311.059 lbf
# Finally we get...
n_fs := H_a*N_b/H_d = 1.10917
# To find the Life, since d=D, T_1=T_2...
T_1 := (F_1*lbf^-1 + K_b/(d*in^-1)) lbf = 529.521 lbf
T_2 := T_1
N_p := ((K/(T_1*lbf^-1))^(-b) + (K/(T_2*lbf^-1))^(-b))^-1 substitute, K == 4208; b == 11.105, float, 5 → 0.49615*10^10 = 4961500000
t := (N_p*(L_p*in^-1)/(720*(V*min/ft))) hr = 919483 hr
t > (9.195*10^5) hr
# Since N_p is greater that 10^9, Shigley recommends that, "If Np >10^9, report that Np =10^9 and t > NpLp/(720V) without placing confidence in numerical values beyond the validity interval."
# 2. Explain the advantages of using V-flat belts over VV-belts.
#
# V-flat belts are commonly used for applications where the 'drum' or the larger sheave is relatively big. Then, because there is sufficient contact length, we don't need the v-groove to increase friction. This means we can avoid the disadvantages of VV-belts like too much friction
#
# and heat which result in increased wear while also maintaining efficiency of power transmission.
#
# 3. A flat-belt drive is to consist of two 4-ft-diameter cast-iron pulleys spaced 16  ft apart. Select a belt type to transmit 60 hp at a pulley speed of 380 rev/min.  Use a service factor of 1.1 and a design factor of 1.0.
# Given:
H_nom := 60 hp
N := 380 rpm
D := 4 ft
d := D
C := 16 ft
K_S := 1.1
n_d := 1
# Required: "Belt type"
V := d/2*N = 4775.22 ft/min
# Assume belt material to be Polyamide A-3, so from table 17-2, we have...
f := 0.8
F_a := 100 lbf/in  # (per unit width)
t := 0.13 in
γ := 0.042 lbf/in^3
# From table 17-4, pulley correction factor C_p for flat belts...
# Since d = 48 in which is over 31.5'', C_p := 1.0 C_v := 1
F_1 := b*F_a*C_p*C_v → 100.0*b*lbf/in
w := 12*γ*b*t → 0.06552*b*lbf/in^2
F_c := (w*in^2/lbf/(g*s^2/ft)*(V*min/ft/60)^2) float, 6 → 415.01*b*ft/(g*s^2)
F_c := 12.67*b*lbf/in → 12.67*b*lbf/in
T := H_nom*K_S*n_d/N = 10946.5 lbf*in
T == (F_1 - F_2)*(d/2) solve, F_2; explicit → (F_1*d - 2*T)/d
F_2 := (F_1*d - 2*T)/d float, 4, simplify → -1.0*5473.0*in*lbf/ft + 100.0*b*lbf/in
F_i := (F_1 + F_2)/2 - F_c simplify; collect, b → b*87.33*lbf/in - 2736.5*in*lbf/ft
exp(f*ϕ) == (F_1 - F_c)/(F_2 - F_c) substitute, ϕ == π; float, 4 → 12.35 == -0.01596*b*ft/(in^2 - 0.01596*b*ft) solve, b; float, 4 → 68.18*in^2/ft = 5.68167 in
# If we choose a standard width like b := 6 in
F_1 := b*F_a*C_p*C_v = 600 lbf
w := 12*γ*b*t = 0.39312 lbf/in
F_c := 12.67*b*lbf/in → 76.02*lbf
F_2 := (F_1*d - 2*T)/d = 143.895 lbf
exp(f'*ϕ) == (F_1 - F_c)/(F_2 - F_c) substitute, ϕ == π; float, 4 → e^(3.142*f') == 7.72 solve, f'; float, 4 → 0.6505
# Since f'(0.65) is less than f (0.80), the design is okay. So the selected belt-type will be a polyamide A-3 flat belt with t=0.13'' and b=6''
# 4. What is the effect of groove angles on V-belt drives?
#
# The groove angle of a V-belt drive affects its performance by influencing the wedging action, power transmission, and belt wear. A smaller groove angle increases the wedging action, enhancing torque transmission but also generating more friction and heat, leading to higher belt wear. Conversely, a larger groove angle reduces the wedging action, making it easier for the belt to move in and out of the groove, which decreases friction and heat but may compromise torque transmission.
#
# 5. What are flat metal belts? What are their application areas? How is their drive  analyzed?
#
# Flat metal belts are power transmission belts made from metal, typically stainless steel. They are designed for high-speed, high-torque applications and are known for their durability, precision, and ability to operate in extreme conditions. These belts have a flat, smooth surface and are often used in applications where cleanliness and resistance to chemicals, heat, and abrasion are critical.
#
# Application Areas
# Flat metal belts are used in a variety of industries and applications, including:
# - Food Processing: For conveying food products in a hygienic manner.
# - Pharmaceuticals: In cleanroom environments where contamination must be minimized.
# - Automotive: For precision manufacturing processes.
# - Electronics: In the production of electronic components.
# - Textiles: For high-speed textile machinery.
# - Packaging: For high-speed packaging lines.
# - Printing: In printing presses for precise and consistent operation.
#
# Drive Analysis
# The analysis of flat metal belt drives involves several key factors:
# Tensioning: Proper tensioning is crucial to ensure the belt operates efficiently and does not slip. This can be achieved through pre-tensioning or using a tension pulley.
# Power Transmission: The power transmitted by the belt is calculated based on the tension difference between the tight and slack sides of the belt and the belt speed.
# Belt Speed: The speed of the belt is determined by the rotational speed of the pulleys and their diameters.
# Belt Length: The length of the belt is calculated based on the center distance between the pulleys and their diameters.
# Friction: The friction between the belt and the pulleys affects the efficiency of power transmission. Proper material selection and surface treatment can enhance friction and reduce slippage.
# Load Distribution: The load distribution across the belt must be uniform to prevent uneven wear and tear.
#
# For a detailed analysis, engineers often use analytical models that consider the elastic behavior of the belt, residual strains, and inertia effects
