# Machine Element II Assignment-I
# by Nahom Merkebu
# UGR/7646/14
# The calculations were all done on PTC Mathcad Prime 10.0 for neatness and accuracy
# 1. Design a cold drawn AISI 1020 steel shaft with a safety factor of 2. The shaft is aimed to support a spur gear at the one end, with pitch diameter of 200mm and a belt at the other end. And the horizontal & the vertical force acting on the belt are 175N & 150N respectively. Two ball bearings are coupled, one in between the shaft and the belt and the second one is at the most end of the shaft. The force F from the drive gear acts at a pressure angle of 20°. The shaft transmits a torque of T = 450 N·m. Take D/d=1.25 and r/d=0.02.
# (a) a static yield analysis using the distortion energy theory and
# (b) a fatigue-failure analysis.
# What will happen to the shaft if we consider the static analysis only?
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# Givens:
n_fs := 2
d_g := 200 mm
V_y := 150 N
V_z := 175 N
ϕ := 20 deg
T := 450 N*m
# Step 1: Calculate for the unknown forces (Reactions and F)
# Solve for F...
F*cos(ϕ)*d_g/2 == T solve, F; explicit → 2*T/(d_g*cos(ϕ)) = 4788.8 N
F := (4.789*10^3) N
# In the x-y plane...
sum(F_y) == 0
V_y + R_Ay - F*sin(ϕ) + R_By == 0
sum(M_A) == 0
-V_y*50*mm - F*sin(ϕ)*200*mm + R_By*250*mm == 0
[V_y + R_Ay - F*sin(ϕ) + R_By == 0; -V_y*50*mm - F*sin(ϕ)*200*mm + R_By*250*mm == 0] solve, R_Ay, R_By; explicit → [(F*sin(ϕ) - 6*V_y)/5, (4*F*sin(ϕ) + V_y)/5]
R_Ay := (F*sin(ϕ) - 6*V_y)/5 = 147.587 N
R_By := (4*F*sin(ϕ) + V_y)/5 = 1340.35 N
# In the x-z plane, after substituting F by an equal force applied at  the beam and not the gear with an added moment
sum(F_z) == 0
# >>
-V_z + R_Az - F*cos(ϕ) + R_Bz == 0
sum(M_A) == 0
# >>
-V_z*50*mm + F*cos(ϕ)*200*mm - R_Bz*250*mm == 0
[-V_z + R_Az - F*cos(ϕ) + R_Bz == 0; -V_z*50*mm + F*cos(ϕ)*200*mm - R_Bz*250*mm == 0] solve, R_Az, R_Bz; explicit → [(F*cos(ϕ) + 6*V_z)/5, (4*F*cos(ϕ) - V_z)/5]
R_Az := (F*cos(ϕ) + 6*V_z)/5 = 1110.04 N
R_Bz := (4*F*cos(ϕ) - V_z)/5 = 3565.15 N
# Step 2: Shear force and bending moment diagrams
# Now to find the bending stresses in each plane, we draw the shear force and moment diagram
#
# 1. The x-y plane.
v_y(x) := 150*Φ(x) + R_Ay*1/N*Φ(x - 50) - F*sin(ϕ)*1/N*Φ(x - 250) + R_By*1/N*Φ(x - 300)
# [plot: v_y(x) vs x]
# *Nevermind the Φ(x) function, it's just Mathcad's unit-step function which makes drawing the shear force diagram easier
# Integrating the shear force to get bending moment...
M_z(x) := integral(148.0*Φ(x - 50.0) + (1340.0*Φ(x - 300.0) + 150.0*Φ(x) - 4790.0*sin(20.0*deg)*Φ(x - 250.0)), x) → (148.0*x - 7400.0)*Φ(x - 50.0) + (1197500.0 - 4790.0*x)*sin(20.0*deg)*Φ(x - 250.0) + (1340.0*x - 402000.0)*Φ(x - 300.0) + 150.0*x*Φ(x)
# [plot: M_z(x) vs x]
# in Newton-mm!
M_max := M_z(250)*N*mm = 67.1 N*m
# Similarly, in the x-z plane...
v_z(x) := -175*Φ(x) + R_Az 1/N*Φ(x - 50) - F*cos(ϕ) 1/N*Φ(x - 250) + R_Bz*1/N*Φ(x - 300)
# [plot: v_z(x) vs x]
1110.0*N*Φ(x - 50.0)/N + (3570.0*N*Φ(x - 300.0)/N - 175.0*Φ(x) - 1.0*4790.0*N*cos(20.0*deg)*Φ(x - 250.0)/N) → 1110.0*Φ(x - 50.0) + (3570.0*Φ(x - 300.0) - 175.0*Φ(x) - 4790.0*cos(20.0*deg)*Φ(x - 250.0))
M_y(x) := integral(1110.0*Φ(x - 50.0) + (3570.0*Φ(x - 300.0) - 175.0*Φ(x) - 4790.0*cos(20.0*deg)*Φ(x - 250.0)), x) → (1110.0*x - 55500.0)*Φ(x - 50.0) + (1197500.0 - 4790.0*x)*cos(20.0*deg)*Φ(x - 250.0) + ((3570.0*x - 1071000.0)*Φ(x - 300.0) - 175.0*x*Φ(x))
# [plot: M_y(x) vs x]
# Again the critical point is at x=250
M_max := M_y(250)*N*mm = 178.25 N*m
# Now, the bending moments in the two orthogonal planes, x-y and x-z are are also orthogonal, (M_z  in the x-y plane and M_x in the x-z plane). Since the moments are vectors, the resultant moment, M_R should be...
M_R == M_z*vectorize(k) + M_y*vectorize(j)  # where vectorize(k) and vectorize(j) are the unit vectors along the z and y axis respectively.
|M_R|^2 == |M_z|^2 + |M_y|^2
M_R(x) := sqrt(M_z(x)^2 + M_y(x)^2)
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# From the given shaft layout, we have two points along the shaft where stress concentrations arise at the shoulders (exact locations not given.)
# [plot: M_R(x) vs x]
# in Newton-mm!
# Since the moment at the left-most shoulder is much less than the others, it's clear that the maximum (critical) stress will be either at location 2 or 3.
M_2 := M_R(229) N*mm = 169.884 N*m
M_3 := M_R(250) N*mm = 190.461 N*m
# Step 3: Stress analysis
# Since our shaft has a shoulder, we need to use a static stress concentration factor, k_t to account for the geometric discontinuity. We are given D/d= 1.25 and r/d= 0.02. From table A-15 of Shigley's 10th edition, we can get the stress concentration for a shaft in bending and the shear stress concentration for a shaft in torsion...
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# Approximating D/d as 1.20 instead of 1.25 because the gap between the curves is small, we get k_ts := 2.1
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# For bending, we don't have a D/d=1.25 curve so we interpolate between the closes curves.
# @ D/d= 1.10, we get k_t_1.1 := 2.24and @D/d=1.5, we get k_t_1.5 := 2.72
# Interpolating, we have (k_t - k_t_1.1)/(1.25 - 1.10) == (k_t_1.5 - k_t_1.1)/(1.5 - 1.10) solve, k_t → 2.42
k_t := 2.42
# When calculating the stress at location 2, we do so for for both an element immediately left of the shoulder at 2 and an element immediately right of the shoulder. The difference in diameters will give different stresses.
σ_2_right := k_t*M_2*d/(2*I) substitute, I == π*d^4/64, float, 3 → 4190.0*N*m/d^3
σ_2_left := k_t*M_2*D/(2*I) substitute, I == π*D^4/64; substitute, D == 1.25*d; float, 3 → 2140.0*N*m/d^3
σ_3 := M_3*d/(2*I) substitute, I == π*d^4/64; float, 3 → 1940.0*N*m/d^3
# *no stress concentration at 3
τ_3 := T*d/(2*J) substitute, J == π*d^4/32 → 7200*N*m/(d^3*π)
τ_2_left := k_ts*T*D/(2*J) substitute, J == π*D^4/32; substitute, D == 1.25*d; float, 3 → 2460.0*N*m/d^3
τ_3 := 7200*N*m/(d^3*π) float, 3 → 2290.0*N*m/d^3
τ_2_left := 2460.0*N*m/d^3 → 2460.0*N*m/d^3
τ_2_right := k_ts*τ_3 → 4809.0*N*m/d^3
# We see that both the bending stress and the shear stress are actually greater at location 2 (right) than 3 (max bending moment). So we now know the critical point is at location 2 (right or thinner section). Next we need to calculate the von-mises stress to get the critical diameter using the distortion energy failure theory.
# Part I. Static failure analysis
# Von-mises stress at location 2, right
# Since there is only bending stress and shear stress substitute, σ_x == σ_2_right and σ_y == 0 and τ_xy == τ_2_right into Mohr's circle to get the principal stresses at the critical point. _σ_2 is principal stress 2, not to be confused with σ_2 which is stress @ 2.
_σ_1 := σ_2_right/2 + sqrt((σ_2_right/2)^2 + τ_2_right^2) simplify, max; float, 3 → 2100.0*N*m/d^3 + 5250.0*N*m*(1.0/d^6)^0.5
_σ_2 := σ_2_right/2 - sqrt((σ_2_right/2)^2 + τ_2_right^2) simplify; float, 3 → -1.0*5250.0*N*m*(1.0/d^6)^0.5 + 2100.0*N*m/d^3
# By von mises stress theory, for biaxial stress condition,
σ' := sqrt(_σ_1^2 + _σ_2^2 - _σ_1*_σ_2) simplify, float, 5 → (0.87098*10^8*N^2*m^2/d^6)^0.5
# And for  cold drawn AISI 1020 steel, yield strength = 390MPa
S_yt := 390 MPa
σ_y := S_yt/n_fs = 195 MPa
# Finally, we get the critical diameter ,d , by equating the von-mises stress to the allowable stress, σ_y
solve block
    # guess values
    d := 1 mm
    # constraints
    (87098000.0*N^2*m^2/d^6)^0.5 == 195.0*MPa
    # solver
    d_static := Find(d) = 36.307 mm
end solve block
σ' == σ_y → (87098000.0*N^2*m^2/d^6)^0.5 == 195.0*MPa
# Solving for d using a solve-block, we get d_static = 36.307 mm and since D/d == 1.25 , D := 1.25*d_static = 45.3837 mm So, the minimum allowable diameter should be 36.3  mm for the thinner sections and 45.4 mm for the thicker middle part.
# Part II. Fatigue failure analysis
# Factor of safety formula using the DE- Goodman criteria (DE means the stresses are combined using the DE theory). Goodman is chosen because it's more conservative and good for a first pass design.
d == (16*n_fs/π*(2*(k_f*M_a)/S_e + ((3*(k_fs*T_m))^2)^0.5/S_ut))^(1/3)  # ...Equation 7-11, Shigley
# Here, the M_a is going to be the max Moment M_max and M_m is going to be 0 because this is a case of completely reversed cycle. And the alternating torque, T_(a,) is zero assuming it's a constant motion shaft. So, the torque only has a midrange component (between the belt and the gear only)
d == (16*n_fs/π*(2*(k_f*M_a)/S_e + ((3*(k_fs*T_m))^2)^0.5/S_ut))^(1/3) substitute, M_a == M.max; substitute, T_m == T, float, 3; explicit, all → d == (5.09*n_fs*(9.0*k_fs^2*T^2)^0.5/S_ut + 10.2*M.max*k_f*n_fs/S_e)^0.333
# We already know that the critical point is at the shoulder at location 2. To calculate the diameter based on the Goodman criteria, we need the ultimate strength, S_ut, and the fully corrected endurance limit, S_e and the fatigue stress concentration factors for normal stress, k_f and for shear k_fs.
M.max := M_3 = 190.461 N*m  # The max moment from the resultant moment diagram from page 3.
# From Table A-20 Shigley, ultimate strength for a AISI 1020 steel, CD: S_ut := 470 MPa
# To find S_e we need to find the Marin factors first...
S_e == k_a*k_b*k_d*k_e*S_e'
k_c
# (loading factor) is not used since it's already considered in the derivation of the formula for the safety factor from the Distortion energy theory
# Since, we are not given the temperature, or any info about the reliability factor, we will neutralize  k_d*k_e == 1
# From table 6-2, the size factor for a cold drawn surface finish is given as (in MPa):
k_a := 4.51*(S_ut*1/MPa)^-0.265 = 0.883223
# From 6-20, k_b is given as:
k_b := 1.24*(d*1/mm)^-0.107 → 1.24/(d/mm)^0.107
# ...where d is in mm for 2.79 < d < 51 mm. (because we have seen that d is in that range from the static analysis.)
# And from equation 6-8, uncorrected endurance limit is given as...
S_e' := 0.5*S_ut = 235 MPa  # ... for S_ut<1400MPa
# So, the fully corrected endurance limit will be...
S_e := k_a*k_b*k_d*k_e*S_e' substitute, k_e == 1, k_d == 1; float, 5 → 257.37*MPa/(d/mm)^0.107
# To find k_f and k_fs we need the notch sensitivity q and for that we need the notch radius, r. But we only have r/d and not r itself so, as is done in Example 7-2 in Shigley's 10th edition,  "For quick, conservative first pass, assume Kf = Kt, Kfs = Kts."
k_f := k_t = 2.42
k_fs := k_ts = 2.1
# Now we have all we need to solve for the diameter of the shaft using the DE- Goodman criteria...
d == (16*n_fs/π*(2*(k_f*M_a)/S_e + ((3*(k_fs*T_m))^2)^0.5/S_ut))^(1/3) substitute, M_a == M.max; substitute, M_m == 0, T_a == 0; substitute, T_m == T, float, 3; explicit, ALL → d == (0.0217*(0.804*10^7*N^2*m^2)^0.5/MPa + 36.5*N*m*(d/mm)^0.107/MPa)^0.333
d == (0.0217*(0.804*10^7*N^2*m^2)^0.5/MPa + 36.5*N*m*(d/mm)^0.107/MPa)^0.333 simplify; float, 5 → d == (36.5*N*m*((d/mm)^0.107 + 1.6858)/MPa)^0.333
solve block
    # guess values
    d := 10 mm
    # constraints
    d == (36.5*N*m*((d/mm)^0.107 + 1.6858)/MPa)^(1/3)
    # solver
    d_fatigue := Find(d) = 48.8919 mm
end solve block
# Solving for d using a solve-block, we get d_fatigue = 48.8919 mm and since D/d == 1.25 , D_fatigue := 1.25*d_fatigue = 61.1149 mm
#
# Comparing this with the diameter we designed using only static analysis, d_static = 36.307 mm which is less than the minimum allowable value we got using the fatigue analysis. This means that had we only considered the static analysis and set the diameter to 37 mm, the shaft would have failed by fatigue failure.
