# 2. Design an input solid shaft for lathe machine transmission that has three spur gears and bearings at the two ends. Take D/d=1.25, r/d=0.02, and assume design factor to be 2. The transmitted torque is assumed to be 250N.m. The pitch diameters for the gears: d1=d3=200mm and d2=150mm. Specify a shaft material and take any assumptions. Justify your solution using ANSYS software.
# Given:
n_fs := 2
T := 250 N*m
d_1 := 200 mm
d_2 := 150 mm
d_3 := d_1 = 200 mm
# Assuming a pressure angle of 20 degree for all 3 gears...
ϕ := 20 deg
# Assume the shaft is along the x-axis, and that the radial (center to center line of the gears) is along the y-axis.
# Calculating F1, F2 and F3
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sum(F_y) == 0
sum(M_z) == 0
solve block
    # guess values
    F_1 := 1 N
    F_2 := 1 N
    F_3 := 1 N
    # constraints
    F_1*cos(ϕ)*d_1/2 == T
    F_2*cos(ϕ)*d_2/2 == T
    F_3*cos(ϕ)*d_3/2 == T
    # solver
    [F_1; F_2; F_3] := Find(F_1, F_2, F_3) = [2660.44; 3547.26; 2660.44] N
end solve block
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sum(F_z) == 0
sum(M_y) == 0
# Calculating the reactions using equilibrium equations
solve block
    # guess values
    R_Ay := 1 N
    R_By := 1 N
    R_Bz := 1 N
    R_Az := 1 N
    # constraints
    R_Ay + R_By - (F_2 + F_3 + F_1)*sin(ϕ) == 0
    (R_By*287 - sin(ϕ)*(F_2*29 + F_1*(29 + 38) + F_3*182))*mm == 0
    R_Az + R_Bz - cos(ϕ)*(F_2 + F_1 + F_3) == 0
    (R_Bz*287 - cos(ϕ)*(F_2*29 + F_1*(29 + 38) + F_3*182))*mm == 0
    # solver
    [R_Ay; R_By; R_Az; R_Bz] := Find(R_Ay, R_By, R_Az, R_Bz) = [2121.05; 912.039; 5827.53; 2505.81] N
end solve block
# We aren't given the distance between the left-most bearing and Gear 2 so I assumed it's 29 mm after measuring from the shaft layout.
sin(20.0*deg)*(-3550.0*N*Φ(x - 29.0) - (2660.0*N*Φ(x - 67.0) + 2660.0*N*Φ(x - 249.0)))/N + 912.0*N*Φ(x - 287.0)/N + 2120.0*N*Φ(x)/N simplify; collect, sin(20.0*deg) → 912.0*Φ(x - 287.0) + 2120.0*Φ(x) - sin(20.0*deg)*(3550.0*Φ(x - 29.0) + 2660.0*Φ(x - 67.0) + 2660.0*Φ(x - 249.0))
# Next, draw shear and moment diagram for both x-y and x-z planes...
v_y(x) := (R_Ay*1/N*Φ(x) + sin(ϕ)*1/N*(-F_2*Φ(x - 29) - F_1*Φ(x - 67) - F_3*Φ(x - 249)) + R_By*1/N*Φ(x - 287))
M_z(x) := integral(912.0*Φ(x - 287.0) + 2120.0*Φ(x) - sin(20.0*deg)*(3550.0*Φ(x - 29.0) + 2660.0*Φ(x - 67.0) + 2660.0*Φ(x - 249.0)), x) → -1.0*x*sin(20.0*deg)*(3550.0*Φ(x - 29.0) + 2660.0*Φ(x - 67.0) + 2660.0*Φ(x - 249.0)) + (29.0*3550.0 - 29.0*0.0)*sin(20.0*deg)*Φ(x - 29.0) + (67.0*6210.0 - 67.0*3550.0)*sin(20.0*deg)*Φ(x - 67.0) + (249.0*8870.0 - 249.0*6210.0)*sin(20.0*deg)*Φ(x - 249.0) + (912.0*x - 261744.0)*Φ(x - 287.0) + 2120.0*x*Φ(x)
v_z(x) := R_Az*1/N*Φ(x) + cos(ϕ)*1/N*(-F_2*Φ(x - 29) - F_1*Φ(x - 67) - F_3*Φ(x - 249)) + R_Bz*1/N*Φ(x - 287)
M_y(x) := integral(2510.0*Φ(x - 287.0) + 5830.0*Φ(x) - cos(20.0*deg)*(3550.0*Φ(x - 29.0) + 2660.0*Φ(x - 67.0) + 2660.0*Φ(x - 249.0)), x) → -1.0*x*cos(20.0*deg)*(3550.0*Φ(x - 29.0) + 2660.0*Φ(x - 67.0) + 2660.0*Φ(x - 249.0)) + (29.0*3550.0 - 29.0*0.0)*cos(20.0*deg)*Φ(x - 29.0) + (67.0*6210.0 - 67.0*3550.0)*cos(20.0*deg)*Φ(x - 67.0) + (249.0*8870.0 - 249.0*6210.0)*cos(20.0*deg)*Φ(x - 249.0) + (2510.0*x - 720370.0)*Φ(x - 287.0) + 5830.0*x*Φ(x)
M_TOT(x) := sqrt(M_z(x)^2 + M_y(x)^2)  # (Because the x-y and x-z planes are orthogonal, we treat the total moment as a resultant vector.)
# [plot: v_y(x) vs x]
# [plot: M_z(x) vs x]
# [plot: v_z(x) vs x]
# [plot: M_y(x) vs x]
# [plot: M_TOT(x) vs x]
# So the highest moment is from x= 67 to 249. M_max = M_TOT(67) = 280734in Newton-mm.
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# Since we aren't given complete geometric information, the remaining lengths were determined by proportion from the given ones.
# [plot: M_TOT(x) vs x]
# in Newton-mm
# The red lines indicate where we have stress concentration due to shoulders. Their thickness is an indication of where the stress might be the highest (the closer they are to the center, the higher the moment and the stress). Since we have many candidates for the critical point, we start with the most likely, the shoulders where we have the highest moment ( @87.4 and @228 measured from the left bearing). Because the moment is the same at both shoulders and each shoulder has the same bigger and smaller diameter (D and d1) we only have to compute d1 once. Then, we consider the shoulder @45.6. The critical points are labelled 1,2,3... from left to right.
# Lets define I and J as functions of d to simplify calculations...
I(d) := π*d^4/64
J(d) := π*d^4/32
# *Assuming D/d=1.25 is for all the shaft sections, and assuming d2<d1: Elements immediately left and right of the shoulder @ location 2 have the same moment, we know the stress will be more on the left (smaller diameter) side so we analyze there only. Assume generous fillet radius for all. From Table 7–1, estimate k_t := 1.7 , k_ts := 1.5
M_TOT(45.6) = 223949  # in Newton-mm
σ_2_left := k_t*(2.239*10^5) N*mm*1*10^-3 m/mm*d2/(2*I(d2)) float, 3 → 3880.0*N*m/d2^3
τ_2_left := k_ts*(T*1/(N*m)*d2/(2*J(d2))) N*m float, 3 → 1910.0*N*m/d2^3
# For a rotating shaft with both bending and torsional stress, von-mises stress is given as: σ' == sqrt(σ_b^2 + 3*τ^2)
σ_2_left' := sqrt(σ_2_left^2 + 3*τ_2_left^2) float, 3, simplify; assume, d2 > 0 → 5100.0*N*m/d2^3
# For location 3, there are no stress concentration factors and it has the same moment and diameter d1 as the left side of shoulder at 4, so the stress at 3 is definitely lower than that at 4 (left side) So we don't need to consider it.
# Again for location 4, we only consider the left (smaller diameter) section.
M_TOT(87.4) = 280601  # in Newton-mm
σ_4_left := k_t*(2.806*10^5) N*mm*1*10^-3 m/mm*d1/(2*I(d1)) float, 3 → 4860.0*N*m/d1^3
τ_4_left := k_ts*(T*1/(N*m)*d1/(2*J(d1))) N*m float, 3 → 1910.0*N*m/d1^3
σ_4_left' := sqrt(σ_4_left^2 + 3*τ_4_left^2) float, 3, simplify; assume, d1 > 0 → 5880.0*N*m/d1^3
# Comparing the von-mises stresses at 2 and 4...
σ_2_left'/σ_4_left' float, 3 → 0.867*d1^3/d2^3
# if this ratio is greater that unity, then the critical point is at 2, and vice versa. Let the ratio d1/d2 == d_ratio
σ_2_left'/σ_4_left' == 0.867*d_ratio^3  # So what is the ratio that makes the stress at 2 greater than the stress at 4?
0.867*d_ratio^3 > 1 solve, d_ratio, float, 3 → d_ratio > 1.05
# So if d1/d2 > 1.05, then the critical point is at 2. Since we are given a value for d1/d2 at shoulders =1.2, it means the critical point is at location 2 shoulder.
# Now to get the diameter at 2, use fatigue analysis...
# For quick, conservative first pass, assume ,k_f := k_t, k_fs := k_ts
#
# Choose inexpensive steel, 1020 CD, with S_ut := 68 ksi. For Se, Eq. (6–19) ka = a*Sut^b  k_a := 2.7*68^-0.265 = 0.882569
# Guess k_b := 0.9. Check later when d is known. k_c := 1 k_d := 1 k_e := 1
# Eq. (6–18) S_e := k_a*k_b*k_c*k_d*k_e*0.5*S_ut float, 4 → 27.01*ksi
# For first estimate of the diameter at the shoulders at location 2, use the DE-Goodman criterion of Eq. (7–8).
# This criterion is good for the initial design, since it is simple and conservative. With Mm = Ta = 0, Eq. (7–8) reduces to
M_critical := M_TOT(45.6)*N*mm = 223.949 N*m
d := (16*n_fs/π*(2*(k_f*M_a)/S_e + ((3*(k_fs*T_m))^2)^0.5/S_ut))^(1/3) float, 3; substitute, T_m == T; substitute, M_a == M_critical → ((0.15*(0.127*10^7*N^2*m^2)^0.5 + 287.0*N*m)/ksi)^0.333
d2 := ((0.15*(0.127*10^7*N^2*m^2)^0.5 + 287.0*N*m)/ksi)^(1/3) = 40.4416 mm
clear(d2)
# Now that we have a first-pass guess for d2, correct further by plugging in the formula for k_b as a function of d2
k_b := 1.24*(d2*1/mm)^-0.107 → 1.24/(d2/mm)^0.107  # ...where d is in mm for 2.79 < d < 51 mm. (because we have seen that d is in that range).
S_e := k_a*k_b*k_c*k_d*k_e*0.5*S_ut float, 4 → 37.21*ksi/(d2/mm)^0.107
d2 := (16*n_fs/π*(2*(k_f*M_a)/S_e + ((3*(k_fs*T_m))^2)^0.5/S_ut))^(1/3) float, 3; substitute, T_m == T; substitute, M_a == M_critical → ((0.15*(0.127*10^7*N^2*m^2)^0.5 + 208.0*N*m*(d2/mm)^0.107)/ksi)^0.333
solve block
    # guess values
    d2 := 40 mm
    # constraints
    d2 == ((0.15*(0.127*10^7*N^2*m^2)^0.5 + 208.0*N*m*(d2/mm)^0.107)/ksi)^(1/3)
    # solver
    d2 := Find(d2) = 41.0977 mm
end solve block
# Using a solve-block to solve for d2 without having to deal with unit conversions...
# So, our first-pass guess was not far off. Assuming D/d=1.25 for all shaft sections, d1 := 1.25*d2 = 51.3721 mm and D := 1.25*d1 = 64.2152 mm
# 3.
# Since my PC couldn't load ANSYS software, I didn't do questions 2 (evaluation part) and 3. I can maybe do the simulation on Solidworks if given the chance...
