# Numerical Assignment #1
# 1. Equation for the deflection curve of a beam is given as:y == w_0/(120*E*I*L)*(-x^5 + 2*L^2*x^3 - L^4*x). Use the bisection method to determine the point of maximum deflection.
y == w_0/(120*E*I*L)*(-x^5 + 2*L^2*x^3 - L^4*x) substitute, L == 600 cm, E == 50000 kN/cm^2, I == 30000 cm^4, w_0 == 2.5 kN/cm; float, 4; simplify → y == -1.0*0.2315*10^-13*x^5/cm^4 + (0.1667*10^-7*x^3/cm^2 - 1.0*0.003*x)
y(x) := -0.2315*10^-13*x^5/cm^4 + (0.1667*10^-7*x^3/cm^2 - 0.003*x)  # where x is in cm too...
y(x) := -0.2315*10^-13*x^5 + (0.1667*10^-7*x^3 - 0.003*x)
y'(x) → -(0.11575*10^-12)*x^4 + 0.5001*10^-7*x^2 - 0.003
x := 0 .. 600
# [plot: y(x) vs x]
# [plot: y'(x) vs x]
# So, to solve y'(x)=0 numerically, guess two points where y'(a)*y'(b)<0
# let ...
a := 100
b := 400  # check if above condition is true for a and b...
y'(a)*y'(b) = -5.11939e-6
# Iteration #1).
c1 := (a + b)/2 = 250
# condition: if y'(a)*y'(c1)<0, update bounds from (a,b) to (a,c1)
# else if, y'(a)*y'(c1)>0, update bounds from (a,b) to (c1, b)
y'(a)*y'(c1) = 8.20055e-7  # so, update bounds from (a,b) to (c1, b)
# Iteration #2).
c2 := (c1 + b)/2 = 325
# Relative error:
|(c2 - c1)/c2|*100 = 23.0769
y'(c1)*y'(c2) = -3.2356e-7  # so, update bounds from (c1, b) to (c1, c2)
# Iteration #3).
c3 := (c1 + c2)/2 = 287.5
# Relative error:
|(c3 - c2)/c3|*100 = 13.0435
y'(c1)*y'(c3) = -1.11942e-7  # so, update bounds from (c1, c2) to (c1, c3)
# Iteration #4).
c4 := (c1 + c3)/2 = 268.75
# Relative error:
|(c4 - c3)/c4|*100 = 6.97674
root == c4 float, 4 → root == 268.8
# So, approximate root for the equation y'(x) == 0 must be 268.75 with an approximate error of 6.977%
# Finally, lets compare against the real answer...
# * 600 is a trivial answer because the beam is fixed support there, and so the maximum deflection is at x=268.3 whereas our approximation was x=268.8, pretty close!
clear(x)
y'(x) == 0 solve, x; float, 4; assume, x > 0 → [268.3; 600.1]
clear(y)
clear(a, b)
# 2. 2*k2*d^(5/2)/5 + 1/2*k1*d^2 - m*g*(d - h) == 0, solve for d given the rest using the secant method...
2*k2*d^(5/2)/5 + 1/2*k1*d^2 - m*g*(d - h) == 0 substitute, k1 == 40000 g/s^2; substitute, k2 == 40 g/(s^2*m^0.5); substitute, m == 95 g; substitute, g == 9.81 m/s^2; substitute, h == 0.43 m → 16.0*g*d^2.5/(s^2*m^0.5) + 400.7385*g*m^2/s^2 + (20000.0*d^2*g/s^2 - 1.0*931.95*d*g*m/s^2) == 0.0
# So, if we assume that d is in meters and f(d) is in millijoules, we can drop the rest of the units...
f(d) := 16.0*d^2.5 + 20000.0*d^2 - 931.95*d + 400.7385
# To solve for the root (f(d)=0) using the secant method, I need to guess two points
f(-2) = 82264.6 + 90.5097i  # hmm... looks like f(d) is not real for d<0
# let
x0 := 1
x1 := 2
x2 := x1 - f(x1)*(x1 - x0)/(f(x1) - f(x0)) = 0.670545
# Error:
|(x2 - x1)/x2|*100 = 198.265
x3 := x2 - f(x2)*(x2 - x1)/(f(x2) - f(x1)) = 0.503551
# Error:
|(x3 - x2)/x3|*100 = 33.1634
x4 := x3 - f(x3)*(x3 - x2)/(f(x3) - f(x2)) = 0.28175
# Error:
|(x4 - x3)/x4|*100 = 78.7225
x5 := x4 - f(x4)*(x4 - x3)/(f(x4) - f(x3)) = 0.164969
# Error:
|(x5 - x4)/x5|*100 = 70.7901
x6 := x5 - f(x5)*(x5 - x4)/(f(x5) - f(x4)) = 0.0661179
# Error:
|(x6 - x5)/x6|*100 = 149.507
# Looks like it's not converging, and if we plot f(d), we see that it doesn't even have any real roots!
# [plot: f(d) vs d]
f(d) == 0 solve, d; float, 4 → [0.02331 + 0.1396i; 0.02331 - 0.1396i]
# It only has complex roots!
clear(f, x1, x0, x3, x4, x2)
# 3. V == π*h^2*(3*R - h)/3
# Given: R=4m and V=40m^3, find h using the Regula Falsi method (Initial guess are 0 and R)
V == π*h^2*(3*R - h)/3 substitute, R == 4*m; substitute, V == 40*m^3 → 40*m^3 == h^2*π*(12*m - h)/3
# Assuming h is in meters and dropping units...
40 == h^2*π*(12 - h)/3  # >>
f(h) := h^2*π*(12 - h) - 120
# [plot: f(h) vs h]
let
a[0] := 0
b[0] := 4
# The regula-falsi equation:
c(k) == (a[k]*f(b[k]) - b[k]*f(a[k]))/(f(b[k]) - f(a[k]))
# Error:
|(c[k] - c[k - 1])/c[k]|*100
# #1
k := 0
c(k) == (a[k]*f(b[k]) - b[k]*f(a[k]))/(f(b[k]) - f(a[k])) explicit, k, a, b → c(0) == ([0][0]*f([4][0]) - [4][0]*f([0][0]))/(f([4][0]) - f([0][0]))
c[0] := ([0][0]*f([4][0]) - [4][0]*f([0][0]))/(f([4][0]) - f([0][0])) → 15/(4*π)
f(a[0])*f(c[0]) = 8595.4
a[1] := c[0]
b[1] := b[0]
# since f(a[0])*f(c[0]) > 0 means the root is NOT between a_0 and b_0 , update the bounds to (c_0, b_0)
# #2
k := 1
c[1] := (a[k]*f(b[k]) - b[k]*f(a[k]))/(f(b[k]) - f(a[k])) → (-(π*(3375/(4*π) - 2700)/(4*π)) + (450 - 960*π))/(π*((-3375/(4*π) + 2700)/(16*π) - 128*π)) = 1.76189
f(a[1])*f(c[1]) = 1443.62
# Error:
|(c[1] - c[0])/c[1]|*100 = 32.2512
a[2] := c[1]
b[2] := b[1]
# #3
k := 2
c[2] := (a[k]*f(b[k]) - b[k]*f(a[k]))/(f(b[k]) - f(a[k])) = 1.91112
f(a[2])*f(c[2]) = 85.4007
a[3] := c[2]
b[3] := b[2]
# Error:
|(c[2] - c[1])/c[2]|*100 = 7.80828
# #4
k := 3
c[3] := (a[k]*f(b[k]) - b[k]*f(a[k]))/(f(b[k]) - f(a[k])) = 1.94203
# Error:
|(c[3] - c[2])/c[3]|*100 = 1.59161
# So, final root= 1.942 and it's indeed the point where the graph crosses the x-axis from the previous plot.
