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# Example 14-8 (From Cengel, Chapter 14)
# Given | Required
β_2_s := 60 deg
c_x := 47.1 m/s
ω := 1750 rpm
r := 0.40 m
β_2_r == ?
β_3 == ?
# Assumptions:
# - Flow is steady in the middle
# - Incompressible flow
# - Constant cross sectional area (c_x=const.)
# - No whirl at exit (α_3 == 0)
tan(β_2_r) == W_2t/c_x == (c_2θ - U)/c_x == (c_2θ - ω*r)/c_x
# And...
tan(β_2_s) == c_2θ/c_x solve, c_2θ; float, 3 → 47.1*m*tan(60.0*deg)/s = 81.5796 m/s
c_2θ := 81.58 m/s
tan(β_2_r) == (c_2θ - ω*r)/c_x
β_2_r := atan((c_2θ - ω*r)/c_x) = 9.96598 deg
# If we design the blades so that there's no whirl at the exit, then c_3 = c_x meaning...
tan(β_3) == ω*r/c_x solve, β_3; float, 6 → atan(14.862*rpm*s) = 57.278 deg
β_3 := 57.278 deg
# Cengel's Answer:
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