# EXAMPLE 14–13 Hydroturbine Design
# A retrofit Francis radial-flow hydroturbine is being designed to replace an old turbine in a hydroelectric dam. The new turbine must meet the following design restrictions in order to properly couple with the existing setup:
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r_2 := 2.50 m
r_1 := 1.77 m
ω := 120 rpm
b_2 := 0.914 m
b_1 := 2.62 m
α_2 := 33 deg
# from the radial
Q := 599 m^3/s
H_gross := 92.4 m  # and the flow at the runner outlet is to have angle 𝛼1 between −10° and 10° from radial
# Required :
β_2 == ?
β_1 == ?
# with case a). 𝛼1=10°  (swirl) and case b). 𝛼1 = 0°  (no swirl)
# Also estimate the power output of the turbine
Q == 2*π*r_2*b_2*c_2r solve, c_2r; float, 5 → 41.722*m/s = 41.722 m/s
c_2r := 41.722 m/s
tan(α_2) == c_2θ/c_2r solve, c_2θ; float, 5 → 41.722*m*tan(33.0*deg)/s = 27.0946 m/s
c_2θ := 27.095 m/s
β_2 := tan(β_2) == c_2r/(c_2θ - U_2) substitute, U_2 == ω*r_2; solve, β_2, float, 4 → -1.0*atan(0.1391/(rpm*s - 0.09032)) = -84.0897 deg
2*π*r_2*b_2*c_2r == 2*π*r_1*b_1*c_1r solve, c_1r; float, 4 → 20.56*m/s
c_1r := 20.56 m/s
# case a). 𝛼1=10°
c_1θ := tan(α_1) == c_1θ/c_1r solve, c_1θ, substitute, α_1 == 10 deg; float, 4 → 20.56*m*tan(10.0*deg)/s = 3.62528 m/s
β_1 := tan(β_1) == c_1r/(c_1θ - U_1) substitute, U_1 == ω*r_1; solve, β_1, float, 4 → -1.0*atan(0.0968/(rpm*s - 0.01707)) = -47.84 deg
# case b). 𝛼1=0°
clear(β_1, c_1θ)
c_1θ := tan(α_1) == c_1θ/c_1r solve, c_1θ, substitute, α_1 == 0 deg; float, 4 → 0.0 = 0
β_1 := tan(β_1) == c_1r/(c_1θ - U_1) substitute, U_1 == ω*r_1; solve, β_1, float, 4 → -1.0*atan(0.0968/(rpm*s)) = -42.7494 deg
# take ρ := 998 kg/m^3
# To estimate the output power...
# case b). 𝛼1=0°  (no swirl)
W'_shaft := ρ*Q*(U_2*c_2θ - U_1*c_1θ) substitute, U_2 == ω*r_2; substitute, U_1 == ω*r_1 → 4859233557.0*kg*m^2*rpm/s^2 = 508.858 MW
# Efficiency is then...
η := W'_shaft/W'_hydraulic substitute, W'_hydraulic == ρ*Q*g*H_gross; float, 3 → 0.00000921*MW*s/(g*kg*m) = 0.939159
# case a). 𝛼1=10°
β_1 := -47.84 deg
c_1θ := 3.625 m/s
W'_shaft := ρ*Q*(U_2*c_2θ - U_1*c_1θ) substitute, U_2 == ω*r_2; substitute, U_1 == ω*r_1 → 4398955907.1*kg*m^2*rpm/s^2 = 460.658 MW
# Efficiency is then...
η := W'_shaft/W'_hydraulic substitute, W'_hydraulic == ρ*Q*g*H_gross; float, 3 → 0.00000834*MW*s/(g*kg*m) = 0.850443
# Notice that the efficiency dropped when there is swirl in the outlet of the turbine.
