# 5. A centrifugal pump is used to raise water against a static head of 18.0 m. The suction and delivery pipes, both 0.15 m in diameter, have, respectively, friction head losses amounting to 2.25 and 7.5 times the dynamic head. The impeller, which rotates at 1450 rev/min, is 0.25 m diameter with eight vanes, radius ratio 0.45, inclined backwards at β’2= 60°. The axial width of the impeller is designed to give constant radial velocity at all radii and is 20 mm at the impeller exit. Assuming a hydraulic efficiency of 0.82 and an overall efficiency of 0.72, determine.
# i. the volume flow rate;
# ii. the slip factor using Busemann’s method;
# iii. the impeller vane inlet angle required for zero incidence angle;
# iv. the power required to drive the pump.
b_2 := 20 mm
D_2 := 0.25 m
ω := 1450 rpm
H_S := 18 m
η_h := 0.82
β_2' := 60 deg
d := 0.15 m
H_L(c) := (2.25 + 7.5)*c^2/(2*g) → 4.875*c^2/g
# i. To calculate the volume flow rate...
ρ := 998 kg/m^3
c := 4*Q/(π*d^2) float, 4 → 56.59*Q/m^2
H := H_S + H_L(c) + c^2/(2*g) float, 4 → 17210.0*Q^2/(g*m^4) + 18.0*m
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# Velocity Triangle>>
U_2 := ω*D_2/2 = 18.9805 m/s
η_h == H/H_i substitute, H_i == U_2*c_θ2/g; float, 4 → 0.82 == 0.9483*g*s/c_θ2 + 906.7*Q^2*s/(c_θ2*m^5)
ϕ_2(Q) := Q/(π*D_2*b_2*U_2) float, 4 → 0.003354*Q*s/(m^2*mm)
η_h == g*H/(U_2^2*(0.818 - 1.732*ϕ_2)) float, 4 → 0.82 == 0.002776*g*s^2*(17210.0*Q^2/(g*m^4) + 18.0*m)/(m^2*(-1.0*0.005809*s/(m^2*mm) + 0.818))
solve block
    # guess values
    Q := 0.1 m^3/s
    # constraints
    0.82 == 0.002776*g*s^2*(17210.0*Q^2/(g*m^4) + 18.0*m)/(m^2*(-1.0*0.005809*Q*s/(m^2*mm) + 0.818))
    # solver
    Find(Q) = 0.0293211 m^3/s
end solve block
# So...
Q := 0.029 m^3/s
ϕ_2 := ϕ_2(Q)
# ii. The Busemann slip factor is then found by : (*Equation from Dixon...)
σ_B := (A - ϕ_2*tan(β_2'))/(1 - ϕ_2*tan(β_2')) substitute, A == 0.818; float, 4 → 1871.0*mm/(m*tan(60.0*deg) - 10280.0*mm) + 1.0 = 0.781117
# iii. The impeller vane inlet angle, β_1' for zero flow incidence is obtained from...
cot(β_1') == c_r1/U_1 == c_r2/U_2*(r_2/r_1) == ϕ_2*r_2/r_1
cot(β_1') == ϕ_2*(r_2/r_1) substitute, r_1 == 0.45*r_2; float, 4 → cot(β_1') == 0.0002161*m/mm
cot(β_1') == 0.000216147*m/mm solve, β_1' → acot(0.000216147*m/mm) = 77.8033 deg
# So, β_1' := 77.803 deg
# iv. The power required is then...
W'_P := ρ*Q*g*H/η_h float, 4 → 35.3*g*kg*(17210.0*Q^2/(g*m^4) + 18.0*m)/s = 6.74206 kW
# So, W'_P := 6.742 kW
